// COMSOL Multiphysics 6.4.0.293 model "cz_gate_interferometric.mph"
// Polarizing Beam Splitter
// A Gaussian beam is incident on a 45-degree thin-film stack embedded in glass material prisms. The thin-film stack is designed from alternating high and low refractive index materials. The wave will be refracted at the Brewster angle at each internal interface. Thus, mainly p-polarized waves (polarization in the plane of incidence) will be transmitted, whereas mainly s-polarized waves (polarization orthogonal to the plane of incidence) will be reflected. Changing the spot radius for the Gaussian beam modifies the polarization discrimination.
// The reflectance and transmittance spectra are calculated for different Gaussian beam spot radii.
// The app automatically calculates the phase expressions necessary for the Electromagnetic Waves, Beam Envelopes interface, when the user changes the design parameters.
// Outline of the model tree

Parameters
  wl0 = 900[nm]  // Center wavelength
  dWl = 200[nm]  // Bandwidth
  w0 = 9.000000000000001E-4[m]  // Spot radius, effects rayleigh range and side length 'a' of PBS. last val: 4
  nPrism_DESIGN = 1.6586  // Refractive index of the glass prisms
  nHigh_DESIGN = 2.3132  // Refractive index of the high-index materials
  nLow_DESIGN = 1.3751  // Refractive index of the low-index material
  z0 = pi*nPrism*w0^2/wl0  // Rayleigh range
  a = 8*w0/sqrt(1-(8*w0/z0)^2)  // Prism side. Originally multiplied by 8, i changed to 1662 to resemble the 30mm thorlabs PBS. Realized 1662 would kill RAM and caused tolerance meshing issues, so nerfed back to 8. Unsure of significance of 8 or 1662.
  nLayers = 7  // Number of dielectric layers
  dHigh = wl0/4/nHigh/cos(alphaHigh)  // Thickness of high-index material layers
  dLow = wl0/4/nLow/cos(alphaLow)  // Thickness of low-index material layers
  E0 = 1[V/m]  // Peak incident electric field
  lda0 = 800[nm]  // Wavelength in vacuum
  k0 = 2*pi/lda0  // Wave number in vacuum
  kParallel = k0*nPrism/sqrt(2)  // Wave vector component parallel to the boundaries
  kHighNormal = k0*sqrt(nHigh^2-nPrism^2/2)  // Wave vector component in high-index materials in the normal direction
  kLowNormal = k0*sqrt(nLow^2-nPrism^2/2)  // Wave vector component in the normal direction for low-index materials
  dStack = floor(nLayers/2)*(dHigh+dLow)+dHigh  // Thickness of thin-film stack
  wlCount = 3  // Number of wavelengths in the sweep
  alphaHigh = asin(nPrism*sin(pi/4)/nHigh)  // Angle in high-index material
  alphaLow = asin(nPrism*sin(pi/4)/nLow)  // Angle in low-index material
  xCOGu = -(a/2+dStack/sqrt(2))/3  // Center of gravity, upper triangle, x-coordinate
  yCOGu = -xCOGu  // Center of gravity, upper triangle, y-coordinate
  xCOGl = -xCOGu  // Center of gravity, lower triangle, x-coordinate
  yCOGl = xCOGu  // Center of gravity, lower triangle, y-coordinate
  n_air = 1  // Aadi's Simple air
  n_antireflection = sqrt(nPrism*n_air)  // Geometric mean of the two materials, I guess this is supposed to work? Corroborats with both the optical discord guy and GPT
  d_antireflection = (800[nm])/(4*n_antireflection)  // Corresponding thickness of AR coating
  air_domain_length = 25[mm]  // Used to parameterize the length of air domains to see how beam propagation affects loss. Was originally 250um when w0=20*wl0.
  pml_thickness = 100*2[um]
  silver_film_thickness = 7[nm]  // Thickness of the normal beamsplitters silver film, found via parameter sweep in normal BS model
  eps_Ag = -16.5-1.06*i  // Relative dielectric constant, Silver
  n_Ag_DESIGN = sqrt(eps_Ag)  // n^2 = permitivvity
  Temp = 300[K]  // Will parameter sweep later for environment's affect on refractive indices
  T = 293.0
  x_lda = lda0*(10^6[1/m])
  s1_ZnS = 3.35933-0.000512262*T+0.0000101086*T^(2)-0.0000000414798*T^(3)+0.0000000000691051*T^(4)  // Temperature-dependent refractive index of Cleartran® ZnS to cryogenic temperatures Doug Leviton and Brad Frey I NASA Goddard Space Flight Center
  s2_ZnS = 0.706131+0.000489603*T-0.00000891159*T^(2)+0.0000000381621*T^(3)-0.0000000000654805*T^(4)
  s3_ZnS = 4.02154-0.0293193*T+0.000231080*T^(2)-0.000000757289*T^(3)+0.000000000831188*T^(4)
  l1_ZnS = 0.161151-0.00000893057*T+0.000000273286*T^(2)-0.00000000123408*T^(3)+0.00000000000229917*T^(4)
  l2_ZnS = 0.282427-0.0000466636*T+0.000000755906*T^(2)-0.00000000277513*T^(3)+0.00000000000435237*T^(4)
  l3_ZnS = 41.1590-0.161010*T+0.00123906*T^(2)-0.00000395895*T^(3)+0.00000000416370*T^(4)
  n_ZnS = sqrt(1+s1_ZnS*x_lda^2/(x_lda^2-l1_ZnS^2)+s2_ZnS*x_lda^2/(x_lda^2-l2_ZnS^2)+s3_ZnS*x_lda^2/(x_lda^2-l3_ZnS^2))-0.001  // 2.3132 from og app builder, 800nm room temp (293K?)
  currentiter = 0
  nSF5_ref = sqrt(1+1.46141885*x_lda^2/(x_lda^2-0.0111826126)+0.247713019*x_lda^2/(x_lda^2-0.0508594669)+0.949995832*x_lda^2/(x_lda^2-112.041888))  // Non temperature dependent Sellmeier equation from schott datasheet
  dT = T-293.15  // Difference between current temperature and measured reference temperature, room temp weather
  n_SF5 = nSF5_ref+((nSF5_ref^2-1)/(2*nSF5_ref))*(2.59e-6*dT+1.76e-8*dT^2-2.03e-11*dT^3+(1.17e-6*dT+1.09e-9*dT^2)/(x_lda^2-0.255^2))  // 1.6586 at 800nm, room temp (293K?)
  w_omega = (2*pi*(2998*10^8[m/s]))/lda0  // Angular frequency
  E_photon = (6.242*10^18)*(6.62607*10^-34)*(2.998*10^8[m])/(lda0)  // Energy in each photon converted to eV
  T_C = (T-273.15[K])/1[K]  // their drude lorentz equation uses celsius instead of kelvin
  eps_inf_34 = 3.38 + 0.00254237*(T_C-23)  // Extrapolating between 23 and 100K
  wp_34 = 8.87 + 0.00192090*(T_C-23)  // Extrapolating between 23 and 100K
  GammaD_34 = 0.026 + 0.000135593*(T_C-23)  // Extrapolating between 23 and 100K
  A1_34 = 7.27 - 0.00293785*(T_C-23)  // Extrapolating between 23 and 100K
  gamma1_34 = 0.14 + 0.000338983*(T_C-23)  // Extrapolating between 23 and 100K
  E1_34 = 4.15 - 0.000338983*(T_C-23)  // Extrapolating between 23 and 100K
  eps_Ag_34 = eps_inf_34-wp_34^2/(E_photon^2+i*GammaD_34*E_photon)+A1_34/(E1_34^2-E_photon^2-i*gamma1_34*E_photon)  // Extrapolating between 23 and 100K
  S1_MgF2 = 0.49948850-2.62696e-5*(T)-4.99110e-8*(T)^2  // https://www.spiedigitallibrary.org/journals/optical-engineering/volume-34/issue-05/0000/Temperature-dependent-refractive-index-models-for-BaF2-CaF2-MgF2-SrF2/10.1117/12.201666.full
  S2_MgF2 = 0.38552565+3.30746e-5*(T)+4.16987e-8*(T)^2
  S3_MgF2 = 2.3187214+5.38686e-6*(T)-9.67447e-8*(T)^2
  n_MgF2 = sqrt(1+S1_MgF2*x_lda^2/(x_lda^2-0.04338408^2)+S2_MgF2*x_lda^2/(x_lda^2-0.09461442^2)+S3_MgF2*x_lda^2/(x_lda^2-23.793604^2))  // 1.3751 from og app builder, 800nm room temp (293K?)
  nPrism = n_SF5
  nHigh = n_ZnS
  nLow = n_MgF2
  n_Ag = sqrt(eps_Ag_34)

Variables
  var13 "Refractive Indices and Wave Vector Components"
    nP = aveop1(ewbe.nxx)  // Refractive index, prisms
    nH = aveop2(ewbe.nxx)  // Refractive index, high-index material
    nL = aveop3(ewbe.nxx)  // Refractive index, low-index material
    kt = k0*nP/sqrt(2)  // Tangential wave vector component
    kHn = k0*sqrt(nH^2-nP^2/2)  // Normal wave vector component, high-index material
    kLn = k0*sqrt(nL^2-nP^2/2)  // Normal wave vector component, low-index material
  var2 "Wave Vector Components"
    k1Prismx = k0*nP  // Wave vector in prisms, first wave, x-component
    k1Prismy = 0[1/m]  // Wave vector in prisms, first wave, y-component
    k1Highx = (kt+kHn)/sqrt(2)  // Wave vector in high-index materials, first wave, x-component
    k1Highy = (kt-kHn)/sqrt(2)  // Wave vector in high-index materials, first wave, y-component
    k1Lowx = (kt+kLn)/sqrt(2)  // Wave vector in low-index materials, first wave, x-component
    k1Lowy = (kt-kLn)/sqrt(2)  // Wave vector in low-index materials, first wave, y-component
    k2Prismx = k1Prismy  // Wave vector in prisms, second wave, x-component
    k2Prismy = k1Prismx  // Wave vector in prisms, second wave, y-component
    k2Highx = k1Highy  // Wave vector in high-index materials, second wave, x-component
    k2Highy = k1Highx  // Wave vector in high-index materials, second wave, y-component
    k2Lowx = k1Lowy  // Wave vector in low-index materials, second wave, x-component
    k2Lowy = k1Lowx  // Wave vector in low-index materials, second wave, y-component
    k1Airx = k0*n_air  // Wave vector for horizontal wave in air domain
    k1Airy = 0[1/m]  // a horizontal wave should have 0 vertical component
    k2Airx = 0[1/m]  // a vertical wave should have 0 horizontal component
    k2Airy = k0*n_air  // Wave vector for vertical wave in vertical domain
  var3 "Phases in First Prism" on domains 2, 6, 18, 21, 22, 24, 44, 47
    phi1 = k1Prismx*x+k1Prismy*y+phi100  // Phase for first wave
    phi2 = k2Prismx*x+k2Prismy*y+phi200  // Phase for second wave
  var14 "Phases for high-index layer1" on domains 3, 19, 25, 48
    phi1 = k1Highx*x+k1Highy*y+phi110  // Phase for first wave
    phi2 = k2Highx*x+k2Highy*y+phi210  // Phase for second wave
  var15 "Phases for low-index layer2" on domains 7, 26, 27, 49
    phi1 = k1Lowx*x+k1Lowy*y+phi120  // Phase for first wave
    phi2 = k2Lowx*x+k2Lowy*y+phi220  // Phase for second wave
  var16 "Phases for high-index layer3" on domains 8, 28, 29, 50
    phi1 = k1Highx*x+k1Highy*y+phi130  // Phase for first wave
    phi2 = k2Highx*x+k2Highy*y+phi230  // Phase for second wave
  var17 "Phases for low-index layer4" on domains 9, 30, 31, 51
    phi1 = k1Lowx*x+k1Lowy*y  // Phase for first wave
    phi2 = k2Lowx*x+k2Lowy*y  // Phase for second wave
  var18 "Phases for high-index layer5" on domains 10, 32, 33, 52
    phi1 = k1Highx*x+k1Highy*y+phi150  // Phase for first wave
    phi2 = k2Highx*x+k2Highy*y+phi250  // Phase for second wave
  var19 "Phases for low-index layer6" on domains 11, 34, 35, 53
    phi1 = k1Lowx*x+k1Lowy*y+phi160  // Phase for first wave
    phi2 = k2Lowx*x+k2Lowy*y+phi260  // Phase for second wave
  var20 "Phases for high-index layer7" on domains 12, 36, 37, 54
    phi1 = k1Highx*x+k1Highy*y+phi170  // Phase for first wave
    phi2 = k2Highx*x+k2Highy*y+phi270  // Phase for second wave
  var21 "Phases for second prism" on domains 5, 13, 38, 39, 45, 55
    phi1 = k1Prismx*x+k1Prismy*y+phi180  // Phase for first wave
    phi2 = k2Prismx*x+k2Prismy*y+phi280  // Phase for second wave
  var24 "Phases for prism PML" on no domains
    phi1 = k1Prismx*pml1.x+k1Prismy*pml1.y+phi180  // Phase for first wave
    phi2 = k2Prismx*pml1.x+k2Prismy*pml1.y+phi280  // Phase for second wave
  var22 "Phases post prism" on domains 4, 15, 16, 20, 23, 41, 42, 46
    phi1 = k1Airx*x+k1Airy*y+phiAirx  // Phase for first wave
    phi2 = k2Airx*x+k2Airy*y+phiAiry  // Phase for second wave
  var23 "Phases post prism PML" on domains 1, 14, 17, 40, 43, 56
    phi1 = k1Airx*pml1.x+k1Airy*pml1.y+phiAirx  // Phase for first wave
    phi2 = k2Airx*pml1.x+k2Airy*pml1.y+phiAiry  // Phase for second wave
  var1 "Positions"
    x0 = -dStack/sqrt(2)  // Boundary 0
    x1 = x0+sqrt(2)*dHigh  // Boundary 1
    x2 = x1+sqrt(2)*dLow  // Boundary 2
    x3 = x2+sqrt(2)*dHigh  // Boundary 3
    x4 = x3+sqrt(2)*dLow  // Boundary 4
    x5 = x4+sqrt(2)*dHigh  // Boundary 5
    x6 = x5+sqrt(2)*dLow  // Boundary 6
    x7 = x6+sqrt(2)*dHigh  // Boundary 7
    x8 = a/2  // Interface of right prism and air domain
  var12 "Power"
    Pin = -intop1(ewbe.nPoav)  // Input beam power
    Ptop = intop2(ewbe.Poavx*nx + ewbe.Poavy*ny)  // Top beam power
    Pright = intop3(ewbe.Poavx*nx + ewbe.Poavy*ny)  // Right beam power
    Pbottom = intop4(ewbe.Poavx*nx + ewbe.Poavy*ny)  // Bottom beam power
    BS1_bin = intop5(ewbe.nPoav)
    BS3_bin = intop6(ewbe.nPoav)
    C_o = intop7(ewbe.nPoav)
    T_o = intop8(ewbe.nPoav)
    Top_power_fraction_PBS1 = Ptop/Pin
    Right_power_fraction_PBS1 = Pright/Pin
    BS1_attenuation_factor = BS1_bin/Pin
    BS3_attenuation_factor = BS3_bin/Pin
    C_o_fraction = C_o/(2*Pin)
    T_o_fraction = T_o/(2*Pin)
    BS3_output_beam = intop9(ewbe.Poavx*nx + ewbe.Poavy*ny)
    Pkept = (BS1_bin+BS3_bin+C_o+T_o)/(2*Pin)

Selections
  disk1: Disk "First Prism" | entitydim = 2; posx = -0.25*a; posy = 0.25*a
  disk2: Disk "Second Prism" | entitydim = 2; posx = 0.25*a; posy = -0.25*a
  sel1: Explicit "Exterior Boundaries" on boundaries adjacent to all domains
  int1: Intersection "Thin-Film Stack Exterior Boundaries" | entitydim = 1; input = {sel1, geom1_pi1_csel3_bnd}
  box1: Box "Left Boundary"
    entitydim = 1
    inputent = selections
    input = {sel1}
    xmax = -0.5*(a-dHigh/sqrt(2))
    ymin = -0.5*a
    ymax = 0.5*a
    condition = allvertices
  box2: Box "Top Boundary"
    entitydim = 1
    inputent = selections
    input = {sel1}
    xmin = -0.5*a
    xmax = 0.5*a
    ymin = 0.5*(a-dHigh/sqrt(2))
    condition = allvertices
  box3: Box "Right Boundary"
    entitydim = 1
    inputent = selections
    input = {sel1}
    xmin = 0.5*(a-dHigh/sqrt(2))
    ymin = -0.5*a
    ymax = 0.5*a
    condition = allvertices
  box4: Box "Bottom Boundary"
    entitydim = 1
    inputent = selections
    input = {sel1}
    xmin = -0.5*a
    xmax = 0.5*a
    ymax = -0.5*(a-dHigh/sqrt(2))
    condition = allvertices
  box5: Box "Top-Right Thin-Film Exterior Boundaries" | entitydim = 1; xmin = 0; ymin = 0; condition = inside
  sel2: Explicit on no domains

Couplings
  intop1: Integration "PBS1_in" on boundaries 4
  intop2: Integration "PBS1_top" on boundaries 8
  intop3: Integration "PBS_right" on boundaries 37
  intop4: Integration "PBS_bottom" on boundaries 25
  intop5: Integration "BS1_Bin" on boundaries 12
  intop6: Integration "BS3_Bin" on boundaries 158
  intop7: Integration "Control Qubit" on boundaries 65
  intop8: Integration "Target Qubit" on boundaries 161
  intop9: Integration "BS3_Out" on boundaries 130
  aveop1: Average "Prism Average" on selection geom1_csel1_dom
  aveop2: Average "High-Index Average" on domains 3, 19, 25, 36, 48, 54
  aveop3: Average "Low-Index Average" on domains 27

Coordinate systems
  pml1: PML "Perfectly Matched Layer 1" on domains 1, 14, 17, 40, 43, 56

Geometry
  geom1 "Geometry 1" (2D, length unit mm)
    r2: Rectangle "left_vertical_arm section 1" | size = {a, air_domain_length}; pos = {-0.5*a, 0.5*a}
    r3: Rectangle "bottom_horizontal_arm section 1" | size = {air_domain_length, a}; pos = {0.5*a, -0.5*a}
    r4: Rectangle "top_horizontal_arm section 1" | size = {air_domain_length, a}; pos = {0.5*a, 0.5*a+air_domain_length}
    r5: Rectangle "right_vertical_arm section 1" | size = {a, air_domain_length}; pos = {0.5*a+air_domain_length, 0.5*a}
    pi1: PartInstance "Thin-Film Stack 1"
      part = part1
      inputname = {nLayers, dHigh, dLow, height}
      inputexpr = {nLayers, dHigh, dLow, sqrt(2)*a-dStack}
      inputvalue = {7.0, 0.000112846297422 [mm], 0.000313451306583 [mm], 10.1809579105 [mm]}
      rot = -45
      selnameobj = {High-Index Material, Low-Index Material, Thin-Film Stack}
      selkeepobj = {on, on, on}
      seltagobj = {pi1_csel1, pi1_csel2, pi1_csel3}
      selnamedom = {High-Index Material, Low-Index Material, Thin-Film Stack}
      selkeepdom = {on, on, on}
      selshowdom = {on, on, on}
      seltagdom = {pi1_csel1.dom, pi1_csel2.dom, pi1_csel3.dom}
      selnamebnd = {High-Index Material, Low-Index Material, Thin-Film Stack}
      selkeepbnd = {off, on, on}
      selshowbnd = {on, on, on}
      seltagbnd = {pi1_csel1.bnd, pi1_csel2.bnd, pi1_csel3.bnd}
      selnamepnt = {High-Index Material, Low-Index Material, Thin-Film Stack}
      selshowpnt = {on, on, on}
      seltagpnt = {pi1_csel1.pnt, pi1_csel2.pnt, pi1_csel3.pnt}
      selkeepnoncontr = off
      argunit = {, m, m, m}
      lengthunit = mm
    pol1: Polygon "Polygon 1, bottom left trapezoid"
      source = table
      table = 
        {-0.5*a, -0.5*a+dStack/sqrt(2)}
        {-0.5*dStack/sqrt(2), 0.5*dStack/sqrt(2)}
        {xCOGu, yCOGu}
        {-0.5*a, 0.5*dStack/sqrt(2)}
    pol2: Polygon "Polygon 2, top left trapezoid"
      source = table
      table = {{xCOGu, yCOGu}, {-0.5*a, 0.5*dStack/sqrt(2)}, {-0.5*a, 0.5*a}, {-0.5*dStack/sqrt(2), 0.5*a}}
    pol3: Polygon "Polygon 3, top right trapezoid"
      source = table
      table = 
        {-0.5*dStack/sqrt(2), 0.5*a}
        {xCOGu, yCOGu}
        {-0.5*dStack/sqrt(2), 0.5*dStack/sqrt(2)}
        {0.5*a-dStack/sqrt(2), 0.5*a}
    uni1: Union | input = pol1, pol2, pol3
    rot1: Rotate "Rotate top prism to make bottom prism"
      input = uni1
      keep = on
      rot = 180
      indexattrtag = rot1.index
      contributeto = csel1
    rot2: Rotate "copy right prism, rotated PBS2"
      input = uni1
      keep = on
      rot = 180
      indexattrtag = rot2.index
      contributeto = csel1
    rot3: Rotate "copy left prism PBS2" | input = uni1; keep = on; indexattrtag = rot3.index; contributeto = csel1
    pi2: PartInstance "Thin-Film Stack 2 PBS2"
      part = part1
      inputname = {nLayers, dHigh, dLow, height}
      inputexpr = {nLayers, dHigh, dLow, sqrt(2)*a-dStack}
      inputvalue = {7.0, 0.000112846297422 [mm], 0.000313451306583 [mm], 10.1809579105 [mm]}
      rot = -45
      selnameobj = {High-Index Material, Low-Index Material, Thin-Film Stack}
      selkeepobj = {on, on, on}
      seltagobj = {pi2_csel1, pi2_csel2, pi2_csel3}
      selnamedom = {High-Index Material, Low-Index Material, Thin-Film Stack}
      selkeepdom = {on, on, on}
      selshowdom = {on, on, on}
      seltagdom = {pi2_csel1.dom, pi2_csel2.dom, pi2_csel3.dom}
      selnamebnd = {High-Index Material, Low-Index Material, Thin-Film Stack}
      selkeepbnd = {off, on, on}
      selshowbnd = {on, on, on}
      seltagbnd = {pi2_csel1.bnd, pi2_csel2.bnd, pi2_csel3.bnd}
      selnamepnt = {High-Index Material, Low-Index Material, Thin-Film Stack}
      selshowpnt = {on, on, on}
      seltagpnt = {pi2_csel1.pnt, pi2_csel2.pnt, pi2_csel3.pnt}
      selkeepnoncontr = off
      argunit = {, m, m, m}
      lengthunit = mm
    mov1: Move "Move right prism up PBS2"
      input = rot2
      displx = a+air_domain_length
      disply = a+air_domain_length
      indexattrtag = mov1.index
    mov2: Move "Move left prism up PBS2"
      input = rot3
      displx = a+air_domain_length
      disply = a+air_domain_length
      indexattrtag = mov2.index
    mov3: Move "Move thin film stack PBS2"
      input = pi1
      displx = a+air_domain_length
      disply = a+air_domain_length
      indexattrtag = mov3.index
    r6: Rectangle "top BS" | size = {a, a}; pos = {-0.5*a, 0.5*a+air_domain_length}
    r7: Rectangle "middle BS" | size = {a, a}; pos = {0.5*a+air_domain_length, -0.5*a}
    r17: Rectangle "bottom BS" | size = {a, a}; pos = {1.5*a+2*air_domain_length, -1.5*a-air_domain_length}
    ls1: LineSegment "top BS thin film" | vertex1 = r6(1) points 3; vertex2 = r6(1) points 1
    ls2: LineSegment "middle BS thin film" | vertex1 = r7(1) points 3; vertex2 = r7(1) points 1
    ls3: LineSegment "bottom BS thin film" | vertex1 = r17(1) points 3; vertex2 = r17(1) points 1
    r8: Rectangle "PML leftmost air" | size = {pml_thickness, air_domain_length}; pos = {-0.5*a-pml_thickness, 0.5*a}
    r9: Rectangle "PML rightmost air"
      size = {pml_thickness, air_domain_length}
      pos = {2.5*a+2*air_domain_length, -1.5*a-air_domain_length+a}
    r10: Rectangle "PML topmost air" | size = {air_domain_length, pml_thickness}; pos = {0.5*a, 1.5*a+air_domain_length}
    r11: Rectangle "PML bottommost air"
      size = {air_domain_length, pml_thickness}
      pos = {1.5*a+air_domain_length, -1.5*a-air_domain_length-pml_thickness}
    r20: Rectangle "PML Prism rightmost top" (disabled)
      size = {air_domain_length-2*pml_thickness, pml_thickness}
      pos = {0.5*a+air_domain_length+a+pml_thickness, -0.5*a-pml_thickness}
    r21: Rectangle "PML middle north air"
      size = {pml_thickness, air_domain_length-0.5*pml_thickness}
      pos = {1.5*a+air_domain_length, 0.5*(a+pml_thickness)}
    r22: Rectangle "PML middle west air 1"
      size = {air_domain_length-pml_thickness, pml_thickness}
      pos = {0.5*a, -0.5*a-pml_thickness}
    r28: Rectangle "PML middle west air west" (disabled)
      size = {pml_thickness, a-pml_thickness}
      pos = {0.5*a+air_domain_length+a+air_domain_length+a, -0.5*a+pml_thickness}
    r24: Rectangle "PML middle south air" (disabled)
      size = {0.002, -0.002+air_domain_length}
      pos = {-0.002+0.5*a+air_domain_length, -0.5*a-air_domain_length}
    r12: Rectangle "Debugging Prism" (disabled) | size = {a, a}; pos = {0.25+0.5*a, 0.25+0.5*a}
    r13: Rectangle "left_vertical_arm section 2"
      size = {a, air_domain_length}
      pos = {0.5*a+air_domain_length, -0.5*a-air_domain_length}
    r14: Rectangle "bottom_horizontal_arm section 2"
      size = {air_domain_length, a}
      pos = {1.5*a+air_domain_length, -1.5*a-air_domain_length}
    r15: Rectangle "top_horizontal_arm section 2" | size = {air_domain_length, a}; pos = {1.5*a+air_domain_length, -0.5*a}
    r16: Rectangle "right_vertical_arm section 2"
      size = {a, air_domain_length}
      pos = {1.5*a+2*air_domain_length, -0.5*a-air_domain_length}
    rot5: Rotate "copy right prism, rotated 1 PBS3"
      input = uni1
      keep = on
      rot = 180
      indexattrtag = rot5.index
      contributeto = csel1
    rot6: Rotate "copy left prism 1 PBS3" | input = uni1; keep = on; indexattrtag = rot6.index; contributeto = csel1
    pi3: PartInstance "Thin-Film Stack 3 PBS3"
      part = part1
      inputname = {nLayers, dHigh, dLow, height}
      inputexpr = {nLayers, dHigh, dLow, sqrt(2)*a-dStack}
      inputvalue = {7.0, 0.000112846297422 [mm], 0.000313451306583 [mm], 10.1809579105 [mm]}
      rot = -45
      selnameobj = {High-Index Material, Low-Index Material, Thin-Film Stack}
      selkeepobj = {on, on, on}
      seltagobj = {pi3_csel1, pi3_csel2, pi3_csel3}
      selnamedom = {High-Index Material, Low-Index Material, Thin-Film Stack}
      selkeepdom = {on, on, on}
      selshowdom = {on, on, on}
      seltagdom = {pi3_csel1.dom, pi3_csel2.dom, pi3_csel3.dom}
      selnamebnd = {High-Index Material, Low-Index Material, Thin-Film Stack}
      selkeepbnd = {off, on, on}
      selshowbnd = {on, on, on}
      seltagbnd = {pi3_csel1.bnd, pi3_csel2.bnd, pi3_csel3.bnd}
      selnamepnt = {High-Index Material, Low-Index Material, Thin-Film Stack}
      selshowpnt = {on, on, on}
      seltagpnt = {pi3_csel1.pnt, pi3_csel2.pnt, pi3_csel3.pnt}
      selkeepnoncontr = off
      argunit = {, m, m, m}
      lengthunit = mm
    mov4: Move "Move right prism up 1 PBS3"
      input = rot5
      displx = a+air_domain_length
      disply = -a-air_domain_length
      indexattrtag = mov4.index
    mov5: Move "Move left prism up 1 PBS3"
      input = rot6
      displx = a+air_domain_length
      disply = -a-air_domain_length
      indexattrtag = mov5.index
    mov6: Move "Move thin film stack PBS3"
      input = pi3
      displx = a+air_domain_length
      disply = -a-air_domain_length
      indexattrtag = mov6.index
    rot7: Rotate "copy right prism, rotated PBS4"
      input = uni1
      keep = on
      rot = 180
      indexattrtag = rot7.index
      contributeto = csel1
    rot8: Rotate "copy left prism PBS4" | input = uni1; keep = on; indexattrtag = rot8.index; contributeto = csel1
    pi4: PartInstance "Thin-Film Stack 4"
      part = part1
      inputname = {nLayers, dHigh, dLow, height}
      inputexpr = {nLayers, dHigh, dLow, sqrt(2)*a-dStack}
      inputvalue = {7.0, 0.000112846297422 [mm], 0.000313451306583 [mm], 10.1809579105 [mm]}
      rot = -45
      selnameobj = {High-Index Material, Low-Index Material, Thin-Film Stack}
      selkeepobj = {on, on, on}
      seltagobj = {pi4_csel1, pi4_csel2, pi4_csel3}
      selnamedom = {High-Index Material, Low-Index Material, Thin-Film Stack}
      selkeepdom = {on, on, on}
      selshowdom = {on, on, on}
      seltagdom = {pi4_csel1.dom, pi4_csel2.dom, pi4_csel3.dom}
      selnamebnd = {High-Index Material, Low-Index Material, Thin-Film Stack}
      selkeepbnd = {off, on, on}
      selshowbnd = {on, on, on}
      seltagbnd = {pi4_csel1.bnd, pi4_csel2.bnd, pi4_csel3.bnd}
      selnamepnt = {High-Index Material, Low-Index Material, Thin-Film Stack}
      selshowpnt = {on, on, on}
      seltagpnt = {pi4_csel1.pnt, pi4_csel2.pnt, pi4_csel3.pnt}
      selkeepnoncontr = off
      argunit = {, m, m, m}
      lengthunit = mm
    mov7: Move "Move right prism up PBS4" | input = rot7; displx = 2*(a+air_domain_length); indexattrtag = mov7.index
    mov8: Move "Move left prism up PBS4" | input = rot8; displx = 2*(a+air_domain_length); indexattrtag = mov8.index
    mov9: Move "Move thin film stack PBS4" | input = pi4; displx = 2*(a+air_domain_length); indexattrtag = mov9.index
    copy1: Copy "CZ 2" (disabled)
      input = mov1, mov2, mov3, mov4, mov5, mov6, mov7, mov8, mov9, pi2, r13, r14, r15, r16, r17, r2, r21, r3, r4, r5, r7, r9, rot1, uni1
      keep = on
      displx = 2*(air_domain_length+a)
      disply = -2*(air_domain_length+a)
      indexattrtag = copy1.index
    r23: Rectangle "univeral qubit set air domain" (disabled)
      size = {3*a+2*air_domain_length, a}
      pos = {-0.5*a, -3.5*a-air_domain_length}
    r25: Rectangle "Quarter Waveplate 1" (disabled) | size = {17.1[um], a}; pos = {0, -3.5*a-air_domain_length}
    r27: Rectangle "Half Waveplate" (disabled) | size = {34.2[um], a}; pos = {air_domain_length, -3.5*a-air_domain_length}
    r26: Rectangle "Quarter Waveplate 2" (disabled)
      size = {17.1[um], a}
      pos = {2*air_domain_length, -3.5*a-air_domain_length}
    ls5: LineSegment (disabled) | vertex1 = copy1(15) points 1; vertex2 = copy1(15) points 3
    r29: Rectangle "right_vertical_arm section 2.1" (disabled)
      size = {a, a}
      pos = {0.5*a+air_domain_length+a+air_domain_length+a, -0.5*a}
    fin: Finalize "Form Union"
    mce1: MeshControlEdges
      input = fin(1) boundaries 8, 29, 30, 33, 35, 37, 65, 79, 110-113, 118, 120, 122, 124, 126, 127, 173, 189, 190, 193, 195, 197
  part1 "Thin-Film Stack" (2D, length unit m)
    pch1: ParameterCheck | condition = nLayers<1
    pch2: ParameterCheck | condition = mod(nLayers,2)==0
    r1: Rectangle "First High-Index Layer"
      size = {dHigh, height}
      pos = {-floor(nLayers/2)/2*(dHigh+dLow)-dHigh/2, -height/2}
      contributeto = csel1
    if1: If | condition = nLayers > 1
    copy1: Copy "Last High-Index Layer"
      input = r1
      keep = on
      displx = floor(nLayers/2)*(dHigh+dLow)
      disply = 0
      indexattrtag = copy1.index
      contributeto = csel1
    r2: Rectangle "First Low-Index Layer"
      size = {dLow, height}
      pos = {-floor(nLayers/2)/2*(dHigh+dLow)+dHigh/2, -height/2}
      contributeto = csel2
    arr1: Array
      input = r1, r2
      size = {floor(nLayers/2), 1}
      fullsize = {floor(nLayers/2), 1}
      displ = {dHigh+dLow, 0}
      indexattrtag = arr1.index
      indexattrtags = {arr1.index1, arr1.index2}
    endif1: EndIf
    uni1: Union | input = arr1, copy1; contributeto = csel3

Materials
  mat0: Common "Aadi's Simple Air" on domains 1, 4-6, 14-17, 20-23, 40-46, 56
    RefractiveIndex: RefractiveIndex
      n = n_air
      ki = 0
  mat1: Common "Prisms" on domains 2, 5, 6, 13, 18, 21, 22, 24, 38, 39, 44, 45, 47, 55
    RefractiveIndex: RefractiveIndex
      n = nPrism
      ki = 0
  mat2: Common "High-Index Material" on domains 3, 8, 10, 12, 19, 25, 28, 29, 32, 33, 36, 37, 48, 50, 52, 54
    RefractiveIndex: RefractiveIndex
      n = nHigh
      ki = 0
  mat3: Common "Low-Index Material" on domains 7, 9, 11, 26, 27, 30, 31, 34, 35, 49, 51, 53
    RefractiveIndex: RefractiveIndex
      n = nLow
      ki = 0
  mat4: Common "Schott N-SF5 Glass"
    def: def "Basic"
      density = 2.86[g/cm^3]
      heatcapacity = 0.77[J/(g*K)]
      thermalconductivity = 1.0[W/(m*K)]
      thermalexpansioncoefficient = 7.94E-6[1/K]
    DispersionModelSellmeierStandard: DispersionModelSellmeierStandard "Sellmeier"
      ODsma = {1.52481889E+00, 1.87085527E-01, 1.42729015E+00, 1.12547560E-02, 5.88995392E-02, 1.29141675E+02}
      Trefsma = 22[degC]
      Prefsma = 1[atm]
    ThermoOpticDispersionModelSchott: ThermoOpticDispersionModelSchott "Schott thermo-optic"
      TOsco = {-2.51E-7, 1.07E-8, -2.4E-11, 7.85E-7, 1.15E-9, 0.278}
      Trefsco = 20[degC]
    Enu: Enu "Young's modulus and Poisson's ratio"
      E = 87.0[GPa]
      nu = 0.237
    InternalTransmittance10: InternalTransmittance10 "Internal transmittance, 10 mm sample thickness"
      taui10 = taui10(c_const/freq)
      int1: Interpolation
        funcnametable = {int1, 1}
        funcname = taui10
        table = {{2500, 0.758}, {2325, 0.831}, {1970, 0.95}, {1530, 0.99}, {1060, 0.998}, {700, 0.996}, {660, 0.995}, {620, 0.995}, {580, 0.996}, {546, 0.995}, {500, 0.99}, {460, 0.982}, {436, 0.973}, {420, 0.963}, {405, 0.928}, {400, 0.905}, {390, 0.826}, {380, 0.642}, {370, 0.276}, {365, 0.116}}
        fununit = 1
        argunit = nm
        plotfuncname = taui10
    InternalTransmittance25: InternalTransmittance25 "Internal transmittance, 25 mm sample thickness"
      taui25 = taui25(c_const/freq)
      int1: Interpolation
        funcnametable = {int1, 1}
        funcname = taui25
        table = {{2500, 0.5}, {2325, 0.63}, {1970, 0.88}, {1530, 0.975}, {1060, 0.994}, {700, 0.989}, {660, 0.987}, {620, 0.988}, {580, 0.991}, {546, 0.988}, {500, 0.976}, {460, 0.956}, {436, 0.935}, {420, 0.91}, {405, 0.83}, {400, 0.78}, {390, 0.62}, {380, 0.33}, {370, 0.04}}
        fununit = 1
        argunit = nm
        plotfuncname = taui25
  mat5: Common "ZnS (Zinc sulfide) (Debenham 1984: Cubic ZnS; n 0.405-13 um)"
    RefractiveIndex: RefractiveIndex
      n = an1(c_const/freq)
      ki = 0
      an1: Analytic | expr = sqrt((8.393)+(0.14383)/(x^2-0.05861241)+(4430.99)/(x^2-1347.6241)); fununit = 1; argunit = um
  mat6: Common "MgF2 (Magnesium fluoride) (Li 1980: n(o) 0.14-7.5 um)"
    RefractiveIndex: RefractiveIndex
      n = an1(c_const/freq)
      ki = 0
      an1: Analytic | expr = sqrt((1.2762)+(0.60967)*x^2/(x^2-(0.0074580496))+(0.0080)*x^2/(x^2-(324.0))+(2.14973)*x^2/(x^2-(625.0))); fununit = 1; argunit = um
  matlnk1: Link "Material Link 1" (disabled) on selection geom1_csel1_dom
  matlnk2: Link "Material Link 2" (disabled) on selection geom1_pi1_csel1_dom | link = mat5
  matlnk3: Link "Material Link 3" (disabled) on selection geom1_pi1_csel2_dom | link = mat6
  mat7: Common "MgF2 (Magnesium fluoride) (Rodríguez-de Marcos et al. 2017: n,k 0.03-2.0 um)" on no domains
    RefractiveIndex: RefractiveIndex
      n = nr(c_const/freq)
      ki = ni(c_const/freq)
      int1: Interpolation
        funcnametable = {int1, 1}
        funcname = nr
        table = 
          {2.99919E-02, 0.925222}
          {3.01236E-02, 0.924148}
          {3.02558E-02, 0.922739}
          {3.03887E-02, 0.921308}
          {3.05221E-02, 0.920206}
          {3.06560E-02, 0.919301}
          {3.07906E-02, 0.918523}
          {3.09258E-02, 0.917841}
          {3.10616E-02, 0.917236}
          {3.11979E-02, 0.916696}
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        fununit = 1
        argunit = um
        plotfuncname = nr
      int2: Interpolation
        funcnametable = {int2, 1}
        funcname = ni
        table = 
          {2.99919E-02, 0.121265}
          {3.01236E-02, 0.121903}
          {3.02558E-02, 0.122539}
          {3.03887E-02, 0.124188}
          {3.05221E-02, 0.125917}
          {3.06560E-02, 0.127636}
          {3.07906E-02, 0.129346}
          {3.09258E-02, 0.131045}
          {3.10616E-02, 0.132734}
          {3.11979E-02, 0.134413}
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        fununit = 1
        argunit = um
        plotfuncname = ni
  mat8: Common "ZnS [tested at -180 °C (93.2 K)]" on no domains
    RefractiveIndex: RefractiveIndex
      n = RIWL_tested_at_180C_1(c_const/freq/1[nm])
      ki = 0
      RIWL_tested_at_180C_1: Piecewise
        arg = WL
        pieces = 
          {500.0, 850.0, 4.267324473-0.00899981259*WL^1+1.622337121E-5*WL^2-1.348232323E-8*WL^3+4.287878788E-12*WL^4}
          {850.0, 1500.0, 2.856060976-0.001705858938*WL^1+2.054758707E-6*WL^2-1.258893597E-9*WL^3+3.835806818E-13*WL^4-4.602217582E-17*WL^5}
          {1500.0, 5500.0, 2.33644406-9.323128672E-5*WL^1+4.28784382E-8*WL^2-1.027188811E-11*WL^3+1.211655011E-15*WL^4-5.661538459E-20*WL^5}
          {5500.0, 14000.0, 2.25611573-1.036958254E-6*WL^1-5.013210924E-10*WL^2+7.633067796E-15*WL^3-1.043005095E-18*WL^4}
  mat9: Common "ZnS [tested at -30 °C (243 K)]" on no domains
    RefractiveIndex: RefractiveIndex
      n = RIWL_tested_at_30C_4(c_const/freq/1[nm])
      ki = 0
      RIWL_tested_at_30C_4: Piecewise
        arg = WL
        pieces = 
          {500.0, 850.0, 4.444649494-0.009914198593*WL^1+1.810155303E-5*WL^2-1.521969697E-8*WL^3+4.893939394E-12*WL^4}
          {850.0, 1500.0, 2.857866217-0.001675216989*WL^1+1.995727046E-6*WL^2-1.211084419E-9*WL^3+3.660876505E-13*WL^4-4.364177222E-17*WL^5}
          {1500.0, 5500.0, 2.341703702-9.182717482E-5*WL^1+4.177750579E-8*WL^2-9.92997668E-12*WL^3+1.164102563E-15*WL^4-5.415384609E-20*WL^5}
          {5500.0, 14000.0, 2.262429495-1.323776803E-6*WL^1-4.697714121E-10*WL^2+5.848497112E-15*WL^3-9.928331648E-19*WL^4}

Physics
  ewbe: ElectromagneticWavesBeamEnvelopes on domains 2-39, 41-56
    dependent variable E1 = {E1x, E1y, E1z}
    WaveVector.PhaseSpec = UserDefined
    WaveVector.phase1 = phi1
    WaveVector.phase2 = phi2
    webe1: WaveEquationBeamEnvelopes (default) | minput_frequency_src = fromCommonDef
    pec1: PerfectElectricConductor (default)
    init1: init "Initial Values 1" (default)
    mbc1: MatchedBoundaryCondition "Matched Boundary Condition 1 (Left Source)" on boundaries 4
      IncidentField = EField
      E0i = {0, E0*exp(-(y/w0)^2), E0*exp(-(y/w0)^2)}
      NoScatteredField = 1
    mbc2: MatchedBoundaryCondition "Matched Boundary Condition 2 (Vertical)" on boundaries 7, 10, 12, 40, 49, 52, 57, 58, 65, 92, 93, 113, 114, 118, 120, 129, 136, 159
      E0i = {0, 0, E0*exp(-(y/w0)^2)}
    mbc3: MatchedBoundaryCondition "Matched Boundary Condition 3 (Horizontal)" on boundaries 9, 25, 37, 38, 41-43, 45, 48, 54, 63, 95, 112, 115-117, 119, 121, 122, 127, 158, 161
      InputWave = SecondWave
      E0i = {0, 0, E0*exp(-(y/w0)^2)}
    mbc4: MatchedBoundaryCondition "Matched Boundary Condition 4 (Bottom Source)" on boundaries 90
      InputWave = SecondWave
      IncidentField = EField
      E0i = {E0*exp(-((x-a-air_domain_length)/w0)^2), 0, E0*exp(-((x-a-air_domain_length)/w0)^2)}
      NoScatteredField = 1
    sctr1: Scattering "Scattering Boundary Condition 1 (remove vertical)" on boundaries 5, 9, 13, 15, 17, 19, 21, 23, 27-34, 39, 50, 55, 59, 60, 62, 66, 68, 70, 72, 74, 76, 78, 80, 82, 84, 86, 88, 94-108, 113, 127, 131, 132, 134, 137, 139, 141, 143, 145, 147, 151-157, 161
      IncidentField = NoIncidentField
    trans1: TransitionBoundaryCondition "ANTIREFLECTION Transition Boundary Condition" on boundaries 8, 10, 37, 42, 53-55, 58-61, 65, 92, 111, 116, 126, 130, 131, 133, 136, 149, 161
      PropagationDirection = NormalDirection
      n_mat = userdef
      n = n_antireflection
      ki_mat = userdef
      ki = 0
      d = d_antireflection
    trans2: TransitionBoundaryCondition "BEAMSPLITTER Transition Boundary Condition 2" on boundaries 11, 56, 128
      n_mat = userdef
      n = real(n_Ag)
      ki_mat = userdef
      ki = imag(n_Ag)
      epsilonr_mat = userdef
      epsilonr = eps_Ag
      d = silver_film_thickness
      murbnd_mat = userdef
      murbnd = 1
      sigmabnd_mat = userdef
      sigmabnd = 0
  ge: GlobalEquations "Global ODEs and DAEs (phases)"
    ge1: GlobalEquations
      name = {phi100, phi110, phi120, phi130, phi150, phi160, phi170, phi180, phi280, phi270, phi260, phi250, phi230, phi220, phi210, phi200, phiAirx, phiAiry, phiPhaseShifterx, phiPhaseShiftery, phiAirxShifted, phiAiryShifted, phiPBS_2_Prismx, phiPBS_2_Prismy}
      equation = {k1Prismx*x0+phi100-k1Highx*x0-phi110, k1Highx*x1+phi110-k1Lowx*x1-phi120, k1Lowx*x2+phi120-k1Highx*x2-phi130, k1Highx*x3+phi130-k1Lowx*x3-0, k1Lowx*x4+0-k1Highx*x4-phi150, k1Highx*x5+phi150-k1Lowx*x5-phi160, k1Lowx*x6+phi160-k1Highx*x6-phi170, k1Highx*x7+phi170-k1Prismx*x7-phi180, k2Prismy*x0+phi280-k2Highy*x0-phi270, k2Highy*x1+phi270-k2Lowy*x1-phi260, k2Lowy*x2+phi260-k2Highy*x2-phi250, k2Highy*x3+phi250-k2Lowy*x3-0, k2Lowy*x4+0-k2Highy*x4-phi230, k2Highy*x5+phi230-k2Lowy*x5-phi220, k2Lowy*x6+phi220-k2Highy*x6-phi210, k2Highy*x7+phi210-k2Prismy*x7-phi200, k1Prismx*x8+phi180-k1Airx*x8-phiAirx, k2Prismy*x8+phi200-k2Airy*x8-phiAiry, k1Airx*(200[um])+phiAirx-k1Prismx*(200[um])-phiPhaseShifterx, k2Airy*(0)[um]+phiAiry-k2Prismy*(0)[um]-phiPhaseShiftery, k1Prismx*(200+10)[um]+phiPhaseShifterx-k1Airx*(200+10)[um]-phiAirxShifted, k2Prismy*(0)[um]+phiPhaseShiftery-k2Airy*(0)[um]-phiAiryShifted, -1*k1Airx*(a/2)+phiAirxShifted - (-1*k1Prismx*(a/2) +phiPBS_2_Prismx), k2Airy*(400[um])+phiAiryShifted - (1*k2Prismy*(400[um]) +phiPBS_2_Prismy)}
      description = {"Phase constant, first wave, layer 0", "Phase constant, first wave, layer 1", "Phase constant, first wave, layer 2", "Phase constant, first wave, layer 3", "Phase constant, first wave, layer 5", "Phase constant, first wave, layer 6", "Phase constant, first wave, layer 7", "Phase constant, first wave, layer 8", "Phase constant, second wave, layer 8", "Phase constant, second wave, layer 7", "Phase constant, second wave, layer 6", "Phase constant, second wave, layer 5", "Phase constant, second wave, layer 3", "Phase constant, second wave, layer 2", "Phase constant, second wave, layer 1", "Phase constant, second wave, layer 0", Should determine phiAirx, phiAiry? Phase shift for wave 2 in horizontal air domain?, phase for wave 1 in phase shifter, phase for wave 2 in phase shifter, air domain phase after phase shifting, air domain phase after phase shifting}
      valueType = complex
      fieldName = ODE1
      DependentVariableQuantity = dimensionless
      CustomDependentVariableUnit = m
      SourceTermQuantity = dimensionless
      CustomSourceTermUnit = m
  ge1: GlobalEquations "Global ODEs and DAEs 1 (refractive indices, useless without function)"
    ge1: GlobalEquations
      name = {nP0, nH0, nL0}
      equation = {aveop1(ewbe.nxx)-nP0, aveop2(ewbe.nxx)-nH0, aveop3(ewbe.nxx)-nL0}
      description = {"Refractive index at center wavelength, prisms", "Refractive index at center wavelength, high-index materials", "Refractive index at center wavelength, low-index materials"}
      valueType = complex
      fieldName = ODE2
      DependentVariableQuantity = dimensionless
      CustomDependentVariableUnit = m
      SourceTermQuantity = dimensionless
      CustomSourceTermUnit = m

Mesh
  mesh1 "Mesh 1"
    size: MeshSizeDefault | hmax = 0.25*w0; hmin = 2.65E-5; custom = on
    edg1: Edge on boundaries 6, 26, 51, 63, 91, 93, 135, 150 | smoothcontrol = on
    map3: Map "Thin film stack 2" on domains 3, 7-12, 19, 25-37, 48-54 | smoothcontrol = on
      dis1: Distribution on no boundaries | numelem = 2
    map2: Map "Mapped 2" on domains 1, 2, 4, 13-18, 20, 23, 24, 38-43, 46, 47, 55-72 | smoothcontrol = on
      dis1: Distribution "PML 5 element enforcer" on boundaries 2, 3, 35, 44, 123, 125, 160, 162
      dis2: Distribution (disabled) on boundaries 184 | numelem = 15
    ftri1: FreeTri "Free Triangular 1" on domains 5, 6, 21, 22, 44, 45 | smoothcontrol = on
      size1: Size on domains 5, 6, 21, 22, 44, 45 | hmax = 0.25*w0/2; hmin = 2.65E-5; custom = on

Studies
  std1 "Study 1"
    param: Parametric "Parametric Sweep"
      sweeptype = filled
      pname = {lda0, T, air_domain_length, w0}
      plistarr = {range(790,5,805), range(285,5,300), range(25,25,75), range(50*20*wl0, 50*20*wl0, 150*20*wl0)}
      punit = {nm, , mm, m}
      keepsol = last
    stat: Stationary | solve for = {ewbe, ge}
    freq: Frequency "Frequency Domain"
      punit = THz
      plist = c_const/lda0
      usestol = on
      stol = 1
      ftplistmethod = manual
      solve for = {ewbe, ge1}

Solver configurations
  sol1 "Solution 1" (study std1)
    v1: Variables "Dependent Variables 1"
    s1: Stationary "Stationary Solver 1"
      dDef: Direct
      fc1: FullyCoupled
    su1: StoreSolution "Solution Store 1"
    v2: Variables "Dependent Variables 2"
    s2: Stationary "Stationary Solver 2"
      dDef: Direct
      p1: Parametric
      fc1: FullyCoupled
  sol3 "Parametric Solutions 1" (study std1)
  sol5 "Solution Store 1" (study std1)

Datasets
  dset1: Solution | solution = sol1
  dset3: Solution | solution = sol3
  dset4: Solution | solution = sol5

Derived values
  gev1: EvalGlobal "Metrics Table"
    data = dset3
    table = tbl7
    expr = {BS1_attenuation_factor, BS3_attenuation_factor, C_o_fraction, T_o_fraction}
    unit = {1, 1, 1, 1}

Plots
  pg1: PlotGroup2D "Electric Field (ewbe)" on domains 1-56 | data = dset3
    surf1: Surface "Electric Field (ewbe)" | expr = ewbe.normE
  pg2: PlotGroup1D "1D Plot Group 2" | data = dset3
    glob1: Global
      expr = {BS1_attenuation_factor, BS3_attenuation_factor, C_o_fraction, T_o_fraction, (BS1_bin+BS3_bin+C_o+T_o)/(2*Pin)}
      descr = {BS1_att, BS3_att, Co, To, Pkept}
      xdata = expr
      xdataexpr = lda0
  pg3: PlotGroup1D "1D Plot Group 3" | data = dset4

Exports
  img1: Image | size = current; unit = px; width = 800; height = 600

Methods
  initializeApplication: CodeEditor
    public class initializeApplication extends ApplicationMethod {
      public void execute() {
        /**
        * Initializes the application. Runs everytime the main form loads.
        * Checks if a solution is available or not and updates the solution state.
        */
        if (!isInitialized) {
          // Save parameter values
          lastWl0 = model.param().get("wl0");
          lastDWl = model.param().get("dWl");
          lastW0 = model.param().get("w0");
          lastW0Min = w0Min;
          lastW0Max = w0Max;
          lastUserDefinedPrismRefractiveIndex = model.param().get("nPrism");
          lastUserDefinedHighIndexRefractiveIndex = model.param().get("nHigh");
          lastUserDefinedLowIndexRefractiveIndex = model.param().get("nLow");
          // Populate the layer count list
          String[] values = new String[51];
          for (int i = 1; i < 102; i += 2) {
            values[i/2] = Integer.toString(i);
          }
          getChoiceList("layerCountList").setList(values, values);
          // Check the available solutions and set the status
          if (model.mesh("mesh1").isEmpty()) {
            polarization = "both";
            model.mesh("mesh1").feature("size").set("hmax", hmax);
            solutionState = "nosolution";
          } else {
            for (SolverSequence sol : model.sol()) {
              if (copySolutionTag.equals(sol.tag())) {
                polarization = "both";
                break;
              }
            }
            hmax = model.mesh("mesh1").feature("size").getString("hmax");
            solutionState = "solutionexists";
            updatePolarizationDisplayList();
            initializeFieldPlot();
            finalizeFieldPlot();
          }
          if (model.mesh("mesh2").isEmpty()) {
            model.study("std2").run();
          }
          updateWavelengthList();
          isInitialized = true;
        }
        updateButtonStatus();
      }
    }
  changeGlobalMaterial: CodeEditor
    public class changeGlobalMaterial extends ApplicationMethod {
      public void execute(String matlnk, String variable, String link, String parameter, String errorMessage) {
        // Changes the global material link
        String oldLink = model.material(matlnk).getString("link");
        model.material(matlnk).set("link", link);
        double value = RefractiveIndexEvaluator.getRefractiveIndex(variable);
        boolean isValid = false;
        if (ParameterValidator.refractiveIndicesAreValid(parameter, value)) {
          if (ParameterValidator.wavelengthMinimumSpotRadiusAndPrismRefractiveIndexAreValid(parameter, sweepType)) {
            isValid = true;
          } else {
            errorMessage = ParameterValidator.MINIMUM_SPOT_RADIUS_ERROR_MESSAGE;
          }
        }
        if (isValid) {
          model.param().set(parameter, value);
          inputHasChanged();
        } else {
          model.material(matlnk).set("link", oldLink);
          // Sets the global material for input parameter
          if ("nPrism".equals(parameter)) {
            prismGlobalMaterial = oldLink;
          } else if ("nHigh".equals(parameter)) {
            highIndexGlobalMaterial = oldLink;
          } else if ("nLow".equals(parameter)) {
            lowIndexGlobalMaterial = oldLink;
          } else {
            error("Internal error: the parameter "+parameter+" is invalid.");
          }
          error(errorMessage);
        }
      }
    }
  changeMaterialType: CodeEditor
    public class changeMaterialType extends ApplicationMethod {
      public void execute(String materialType, String lastUserDefinedRefractiveIndex, String parameter, String variable, String matlnk, String errorMessage) {
        // Changes the material type (user defined or from material)
        boolean isFromMaterial = "fromMaterial".equals(materialType);
        model.material(matlnk).active(isFromMaterial);
        String paramValue;
        if (isFromMaterial) {
          setLastUserDefinedRefractiveIndex(parameter);
          paramValue = Double.toString(RefractiveIndexEvaluator.getRefractiveIndex(variable));
        } else
          paramValue = lastUserDefinedRefractiveIndex;
        model.param().set(parameter, paramValue);
        boolean failed = true;
        if (ParameterValidator.refractiveIndicesAreValid()) {
          if (ParameterValidator.wavelengthMinimumSpotRadiusAndPrismRefractiveIndexAreValid(parameter, sweepType)) {
            failed = false;
          } else {
            errorMessage = ParameterValidator.MINIMUM_SPOT_RADIUS_ERROR_MESSAGE;
          }
        }
        if (failed) {
          setMaterialType(parameter, isFromMaterial ? "userDefined" : "fromMaterial");
          model.material(matlnk).active(!isFromMaterial);
          paramValue = isFromMaterial ? lastUserDefinedRefractiveIndex :
            Double.toString(RefractiveIndexEvaluator.getRefractiveIndex(variable));
          model.param().set(parameter, paramValue);
          error(errorMessage);
        } else {
          inputHasChanged();
        }
      }
    }
  changeRefractiveIndex: CodeEditor
    public class changeRefractiveIndex extends ApplicationMethod {
      public void execute(String parameter, String lastUserDefinedRefractiveIndex, String errorMessage) {
        // Changes the user defined refractive index
        boolean failed = true;
        if (ParameterValidator.refractiveIndicesAreValid()) {
          if (ParameterValidator.wavelengthMinimumSpotRadiusAndPrismRefractiveIndexAreValid(parameter, sweepType)) {
            failed = false;
          } else {
            errorMessage = ParameterValidator.MINIMUM_SPOT_RADIUS_ERROR_MESSAGE;
          }
        }
        if (failed) {
          model.param().set(parameter, lastUserDefinedRefractiveIndex);
          error(errorMessage);
        } else {
          setLastUserDefinedRefractiveIndex(parameter);
          inputHasChanged();
        }
      }
    }
  compute: CodeEditor
    public class compute extends ApplicationMethod {
      public void execute() {
        /**
        * Computes the solution and plots the results
        */
        // First set the solution state to nosolution, which is a good state if the computation is cancelled by the user
        solutionState = "computationInProgress";
        // Set plot group 1 and the first global plot to use the first parametric solution dataset.
        // Otherwise, they are removed when the solution copy is removed.
        model.result("pg1").set("data", getParametricSolutionDataSetTag());
        model.result("pg2").feature("glob1").set("data", getParametricSolutionDataSetTag());
        // Remove the copied dataset
        for (String tag : model.sol().tags())
          if (copySolutionTag.equals(tag)) {
            model.sol().remove(tag);
            break;
          }
        // Set what components to solve for and the incident field
        if ("p".equals(polarization)) {
          model.physics("ewbe").prop("components").set("components", "inplane");
          model.physics("ewbe").feature("mbc1").set("E0i", new String[]{"0", "E0*exp(-(y/w0)^2)", "0"});
        } else {
          model.physics("ewbe").prop("components").set("components", "outofplane");
          model.physics("ewbe").feature("mbc1").set("E0i", new String[]{"0", "0", "E0*exp(-(y/w0)^2)"});
        }
        if ("both".equals(polarization))
          setProgressInterval("Computing s-polarization", 0, 40);
        // Initialize the field plot
        initializeFieldPlot();
        model.study("std1").run();
        // Run again for p-polarization
        if ("both".equals(polarization)) {
          model.physics("ewbe").prop("components").set("components", "inplane");
          model.physics("ewbe").feature("mbc1").set("E0i", new String[]{"0", "E0*exp(-(y/w0)^2)", "0"});
          copySolutionTag = model.sol().uniquetag("sol");
          model.sol("sol3").copySolution(copySolutionTag);
          setProgressInterval("Computing p-polarization", 40, 100);
          model.study("std1").run();
        }
        solutionState = "solutionexists";
        // Update and plot the Electric field
        finalizeFieldPlot();
        updateButtonStatus();
      }
    }
  createAndShowMesh: CodeEditor
    public class createAndShowMesh extends ApplicationMethod {
      public void execute(String meshSize) {
        // Creates and plots the mesh
        // If the mesh size has been changed, change maximum mesh element size and the solution state.
        if (!meshSize.equals(currentMeshSize)) {
          if (meshSize.equals("Coarser")) {
            hmax = "w0";
          } else if (meshSize.equals("Coarse")) {
            hmax = "w0/2";
          } else if (meshSize.equals("Normal")) {
            hmax = "w0/4";
          } else if (meshSize.equals("Fine")) {
            hmax = "w0/8";
          } else if (meshSize.equals("Finer")) {
            hmax = "w0/16";
          }
          model.mesh("mesh1").feature("size").set("hmax", hmax);
          inputHasChanged();
          currentMeshSize = meshSize;
        }
        // Create the mesh.
        model.mesh("mesh1").run();
        // Plot the mesh and perform a Zoom Extents command.
        useGraphics(model.component("comp1").mesh("mesh1"), "/main/graphics1");
        zoomExtents("/main/graphics1");
        activePlotType = "";
      }
    }
  createReport: CodeEditor
    public class createReport extends ApplicationMethod {
      public void execute() {
        /**
        * Creates and saves a report in Microsoft(R) Word format.
        */
        if (solutionState.equals("nosolution")) {
          alert("No solution is available yet. Click the Compute button to obtain a solution before generating the report.", "Cannot create report");
        } else if (solutionState.equals("inputchanged")) {
          alert("Solution not updated yet. Click the Compute button to obtain an updated solution before generating the report.", "Cannot create report");
        } else {
          model.result().report("rpt1").run();
        }
      }
    }
  evaluateExpression: CodeEditor
    public class evaluateExpression extends ApplicationMethod {
      public double execute(String expr) {
        double out = 0.0; {
        // Evaluates the expression in the input argument
        model.param().set("expr", expr);
        out = model.param().evaluate("expr");
        model.param().remove("expr");
        } return out;
      }
    }
  finalizeFieldPlot: CodeEditor
    public class finalizeFieldPlot extends ApplicationMethod {
      public void execute() {
        // Finalizes the field plot
        with(model.result("pg1"));
          set("looplevel", new String[]{"1", Integer.toString("wavelength".equals(sweepType) ? wlSol : w0Sol)});
          if ("s".equals(polarizationDisplay) && "both".equals(polarization)) {
            set("data", getCopySolutionDataSetTag());
          } else {
            set("data", getParametricSolutionDataSetTag());
          }
        endwith();
        with(model.result("pg1").feature("surf1"));
          set("expr", "ewbe.normE"+("firstWave".equals(electricFieldPlotType) ? "1" : ("secondWave".equals(electricFieldPlotType) ? "2" : "")));
        endwith();
        model.result("pg1").run();
        zoomExtents("/main/graphics1");
      }
    }
  getCopySolutionDataSetTag: CodeEditor
    public class getCopySolutionDataSetTag extends ApplicationMethod {
      public String execute() {
        String out = null; {
        // Returns the tag for the dataset referring to the copy solution
        out = null;
        for (PropFeature dset : model.result().dataset()) {
          if ("Solution".equals(dset.getType()) && copySolutionTag.equals(dset.getString("solution"))) {
            out = dset.tag();
            break;
          }
        }
        } return out;
      }
    }
  getGlobalMaterialTag: CodeEditor
    public class getGlobalMaterialTag extends ApplicationMethod {
      public String execute(String label) {
        String out = null; {
        // Returns the tag for the global material with the provided label or
        // null if no global material exists with the provided label
        out = null;
        if (label != null) {
          for (Material material : model.material())
            if (!"comp1".equals(material.model()) && label.equals(material.label())) {
              out = material.tag();
              break;
            }
        }
        } return out;
      }
    }
  getMaximumSpotRadius: CodeEditor
    public class getMaximumSpotRadius extends ApplicationMethod {
      public double execute() {
        double out = 0.0; {
        // Returns the maximum spot radius
        out = evaluateExpression(w0Max);
        } return out;
      }
    }
  getMinimumSpotRadius: CodeEditor
    public class getMinimumSpotRadius extends ApplicationMethod {
      public double execute() {
        double out = 0.0; {
        // Returns the minimum spot radius
        out = evaluateExpression(w0Min);
        } return out;
      }
    }
  getParametricSolutionDataSetTag: CodeEditor
    public class getParametricSolutionDataSetTag extends ApplicationMethod {
      public String execute() {
        String out = null; {
        // Returns the tag for the dataset referring to the parametric solution
        out = null;
        for (PropFeature dset : model.result().dataset()) {
          if ("Study 1/Parametric Solutions 1".equals(dset.label())) {
            out = dset.tag();
            break;
          }
        }
        } return out;
      }
    }
  initializeFieldPlot: CodeEditor
    public class initializeFieldPlot extends ApplicationMethod {
      public void execute() {
        // Initializes the field plot
        with(model.result("pg1"));
          set("xlabelactive", "on");
          set("xlabel", "x (µm)");
          set("ylabelactive", "on");
          set("ylabel", "y (µm)");
          set("titletype", "manual");
          String title = ("firstWave".equals(electricFieldPlotType) ? "First wave" :
                          ("secondWave".equals(electricFieldPlotType) ? "Second wave" : "Total"))+
            " electric field norm (V/m)";
          set("title", title);
          set("paramindicator", "");
        endwith();
        useGraphics(model.result("pg1"), "/main/graphics1");
        zoomExtents("/main/graphics1");
        activePlotType = "electricFieldOptions";
      }
    }
  inputHasChanged: CodeEditor
    public class inputHasChanged extends ApplicationMethod {
      public void execute() {
        // Updates the solution state when an input has changed
        solutionState = "inputchanged";
        updateButtonStatus();
      }
    }
  redefineGeometry: CodeEditor
    public class redefineGeometry extends ApplicationMethod {
      public void execute() {
        // Redefines the geometry, when the number of layers has changed
        showProgress(false, false, false);
        model.geom("geom1").run();
        int nLayers = (int) model.param().evaluate("nLayers");
        if (nLayers > 1) {
          model.geom("geom1").feature("pi1").setEntry("selkeepobj", "pi1_csel2", "on");
          model.geom("geom1").feature("pi1").setEntry("selkeepdom", "pi1_csel2.dom", "on");
          model.material("mat3").selection().named("geom1_pi1_csel2_dom");
          model.material("matlnk3").selection().named("geom1_pi1_csel2_dom");
        }
        // Recompute positions
        model.variable().remove("var1");
        Expr positions = model.variable().create("var1");
        positions.model("comp1");
        positions.label("Positions");
        positions.set("x0", "-dStack/sqrt(2)", "Boundary 0");
        for (int iPair = 0; iPair < Math.floor(nLayers/2); iPair++) {
          positions.set("x"+(iPair*2+1), "x"+iPair*2+"+sqrt(2)*dHigh", "Boundary "+(iPair*2+1));
          positions.set("x"+(iPair+1)*2, "x"+(iPair*2+1)+"+sqrt(2)*dLow", "Boundary "+(iPair+1)*2);
          setProgress((int) (iPair*30/Math.floor(nLayers/2)));
        }
        positions.set("x"+nLayers, "x"+(nLayers-1)+"+sqrt(2)*dHigh", "Boundary "+nLayers);
        setProgress(30);
        // Recompute phases in the different layers (except for the first prism where the expressions do not need to change)
        for (String tag : model.variable().tags()) {
          if (!contains(new String[]{"var1", "var2", "var3", "var12", "var13"}, tag))
            model.variable().remove(tag);
        }
        int m = nLayers/2+1;
        for (int iLayer = 1; iLayer < nLayers+2; iLayer++) {
          Expr var = model.variable().create(model.variable().uniquetag("var"));
          var.model("comp1");
          var.label("Phases for "+(iLayer == (nLayers+1) ? "second prism" : ((iLayer%2) == 1 ? "high" : "low")+"-index layer"+iLayer));
          var.selection().geom("geom1", 2);
          var.selection().set(new int[]{iLayer+1});
          String type = iLayer == (nLayers+1) ? "Prism" : ((iLayer%2) == 1 ? "High" : "Low");
          var.set("phi1", "k1"+type+"x*x+k1"+type+"y*y"+(iLayer == m ? "" : "+phi1"+iLayer+"0"), "Phase for first wave");
          var.set("phi2", "k2"+type+"x*x+k2"+type+"y*y"+(iLayer == m ? "" : "+phi2"+iLayer+"0"), "Phase for second wave");
          setProgress((int) (iLayer*30/(nLayers+1))+30);
        }
        setProgress(60);
        // Redefine the global equations
        model.physics().remove("ge");
        Physics ge = model.physics().create("ge", "GlobalEquations", "geom1");
        PhysicsFeature ge1 = ge.feature("ge1");
        for (int iPos = 0; iPos < nLayers+1; iPos++) {
          int iLayer = iPos < m ? iPos : iPos+1;
          ge1.setIndex("name", "phi1"+iLayer+"0", iPos, 0);
          String k1 = "k1"+(iPos == 0 ? "Prism" : ((iPos%2) == 1 ? "High" : "Low"))+"x";
          String phi1 = iPos == m ? "0" : ("phi1"+iPos+"0");
          String k2 = "k1"+(iPos == nLayers ? "Prism" : ((iPos%2) == 0 ? "High" : "Low"))+"x";
          String phi2 = iPos == (m-1) ? "0" : "phi1"+(iPos+1)+"0";
          ge1.setIndex("equation", k1+"*x"+iPos+"+"+phi1+"-"+k2+"*x"+iPos+"-"+phi2, iPos, 0);
          ge1.setIndex("description", "Phase constant, first wave, layer "+iLayer, iPos, 0);
          setProgress((int) (iLayer*20/(nLayers))+60);
        }
        for (int index = nLayers+1; index < 2*(nLayers+1); index++) {
          int iPos = index-nLayers-1;
          int iLayer = iPos < m ? (nLayers+1-iPos) : (nLayers-iPos);
          ge1.setIndex("name", "phi2"+iLayer+"0", index, 0);
          String k1 = "k2"+(iPos == 0 ? "Prism" : ((iPos%2) == 1 ? "High" : "Low"))+"y";
          String phi1 = iPos == m ? "0" : "phi2"+(nLayers+1-iPos)+"0";
          String k2 = "k2"+(iPos == nLayers ? "Prism" : ((iPos%2) == 0 ? "High" : "Low"))+"y";
          String phi2 = iPos == (m-1) ? "0" : "phi2"+(nLayers-iPos)+"0";
          ge1.setIndex("equation", k1+"*x"+iPos+"+"+phi1+"-"+k2+"*x"+iPos+"-"+phi2, index, 0);
          ge1.setIndex("description", "Phase constant, second wave, layer "+iLayer, index, 0);
          setProgress((int) ((index-nLayers)*20/(2*(nLayers+1)))+80);
        }
        setProgress(100);
        // Do not solve for the ODEs in the Frequency Domain study step
        model.study("std1").feature("freq").set("activate", new String[]{"ewbe", "on", "ge", "off"});
        // Only enable the average operator for the low-index material if the number of layers is larger than 1
        model.cpl("aveop3").active(nLayers > 1);
        if (nLayers > 1)
          model.cpl("aveop3").selection().named("geom1_pi1_csel2_dom");
        inputHasChanged();
      }
    }
  resetToDefault: CodeEditor
    public class resetToDefault extends ApplicationMethod {
      public void execute() {
        /**
        * Opens a confirm dialog to check whether the user would like to
        * reset all parameters to default values or not.
        * Changes the solutionState to "nosolution"
        */
        if (confirm("Are you sure you want to reset all the parameters? This will overwrite your current settings.", "Reset parameters to default values").equals("Yes")) {
          // Reset parameters
          model.param().set("wl0", "550[nm]");
          model.param().set("dWl", "500[nm]");
          model.param().set("w0", "20*wl0");
          model.param().set("nPrism", "1.673");
          model.param().set("nHigh", "2.3");
          model.param().set("nLow", "1.38");
          model.param().set("nLayers", "7");
          model.param().set("wlCount", "11");
          // Reset variables declared in application
          w0Count = 10;
          wlSol = 1;
          w0Sol = 1;
          wlnSol = 0;
          prismMaterialType = "userDefined";
          highIndexMaterialType = "userDefined";
          lowIndexMaterialType = "userDefined";
          sweepType = "wavelength";
          w0Min = "5*wl0";
          w0Max = "100*wl0";
          polarization = "both";
          solutionState = "nosolution";
          hmax = "w0/4";
          lastWl0 = model.param().get("wl0");
          lastDWl = model.param().get("dWl");
          lastW0 = model.param().get("w0");
          lastW0Min = w0Min;
          lastW0Max = w0Max;
          // Change to the wavelength range and update the wavelength list
          setWavelengthSweep();
          updateWavelengthList();
          // Recompute the geometry
          redefineGeometry();
          // Make sure that the low-index material widgets are enabled
          nLCombobox.set("enabled", true);
          nLCardstack.set("enabled", true);
          inputHasChanged();
          updateButtonStatus();
        }
      }
    }
  setLastUserDefinedRefractiveIndex: CodeEditor
    public class setLastUserDefinedRefractiveIndex extends ApplicationMethod {
      public void execute(String parameter) {
        // Sets the last user-defined refractive index, for the input parameter
        if ("nPrism".equals(parameter)) {
          lastUserDefinedPrismRefractiveIndex = model.param().get(parameter);
        }
        else if ("nHigh".equals(parameter)) {
          lastUserDefinedHighIndexRefractiveIndex = model.param().get(parameter);
        }
        else if ("nLow".equals(parameter)) {
          lastUserDefinedLowIndexRefractiveIndex = model.param().get(parameter);
        }
        else {
          error("Internal error: the parameter "+parameter+" is invalid.");
        }
      }
    }
  setMaterialType: CodeEditor
    public class setMaterialType extends ApplicationMethod {
      public void execute(String parameter, String materialType) {
        // Sets the material type for the input parameter
        if ("nPrism".equals(parameter)) {
          prismMaterialType = materialType;
        } else if ("nHigh".equals(parameter)) {
          highIndexMaterialType = materialType;
        } else if ("nLow".equals(parameter)) {
          lowIndexMaterialType = materialType;
        } else {
          error("Internal error: the parameter "+parameter+" is invalid.");
        }
      }
    }
  setSpotRadiusSweep: CodeEditor
    public class setSpotRadiusSweep extends ApplicationMethod {
      public void execute() {
        // Sets the spot radius sweep range
        model.study("std1").feature("param").setIndex("pname", "w0", 0);
        if (w0Count > 1)
          model.study("std1").feature("param").setIndex("plistarr", "range("+w0Min+",("+w0Max+"-"+w0Min+")/("+w0Count+"-1),"+w0Max+")", 0);
        else
          model.study("std1").feature("param").setIndex("plistarr", w0Min, 0);
        model.study("std1").feature("param").setIndex("punit", "um", 0);
      }
    }
  setWavelengthSweep: CodeEditor
    public class setWavelengthSweep extends ApplicationMethod {
      public void execute() {
        // Sets the wavelength sweep range
        model.study("std1").feature("param").setIndex("pname", "lda0", 0);
        int wlCount = (int) model.param().evaluate("wlCount");
        if (wlCount > 1)
          model.study("std1").feature("param")
            .setIndex("plistarr", "range(wl0-dWl/2,(wl0+dWl/2-(wl0-dWl/2))/(wlCount-1),wl0+dWl/2)", 0);
        else
          model.study("std1").feature("param")
            .setIndex("plistarr", "wl0", 0);
        model.study("std1").feature("param").setIndex("punit", "nm", 0);
      }
    }
  showRefractiveIndexPlotDialog: CodeEditor
    public class showRefractiveIndexPlotDialog extends ApplicationMethod {
      public void execute(String tag) {
        // Shows the refractive index dialog
        refractiveIndexToPlot = tag;
        refractiveIndexDialogPlotHeading = "Refractive index for "+model.material(tag).label();
        dialog("refractiveIndexPlot");
      }
    }
  updateButtonStatus: CodeEditor
    public class updateButtonStatus extends ApplicationMethod {
      public void execute() {
        /**
        * Based on solution status, set the availability of buttons
        */
        boolean availabilty = solutionState.equals("solutionexists");
        electricField.set("enabled", availabilty);
        reflectance.set("enabled", availabilty);
        refractiveIndex.set("enabled", availabilty);
        report.set("enabled", availabilty);
      }
    }
  updatePolarizationDisplayList: CodeEditor
    public class updatePolarizationDisplayList extends ApplicationMethod {
      public void execute() {
        // Updates the polarization display choice list, used by the polarization display selection combobox
        String[] value;
        String[] display;
        if ("s".equals(polarization)) {
          value = new String[]{"s"};
          display = new String[]{"s"};
        } else if ("p".equals(polarization)) {
          value = new String[]{"p"};
          display = new String[]{"p"};
        } else {
          value = new String[]{"s", "p"};
          display = new String[]{"s", "p"};
        }
        getChoiceList("polarizationDisplayList").setList(value, display);
        if ("s".equals(polarization)) {
          polarizationDisplay = "s";
        } else if ("p".equals(polarization)) {
          polarizationDisplay = "p";
        }
      }
    }
  updateReflectancePlot: CodeEditor
    public class updateReflectancePlot extends ApplicationMethod {
      public void execute() {
        model.result("pg2").feature("glob1").set("xdatasolnumtype", "outer");
        model.result("pg2").feature("glob2").set("xdatasolnumtype", "outer");
        if ("wavelength".equals(sweepType)) {
          model.result("pg2").feature("glob1").set("xdataexpr", "lda0");
          model.result("pg2").feature("glob1").set("xdataunit", "nm");
          model.result("pg2").feature("glob2").set("xdataexpr", "lda0");
          model.result("pg2").feature("glob2").set("xdataunit", "nm");
        } else {
          model.result("pg2").feature("glob1").set("xdataexpr", "w0");
          model.result("pg2").feature("glob1").set("xdataunit", "\u00b5m");
          model.result("pg2").feature("glob2").set("xdataexpr", "w0");
          model.result("pg2").feature("glob2").set("xdataunit", "\u00b5m");
        }
        if ("both".equals(polarization)) {
          model.result("pg2").feature("glob1").active(true);
          model.result("pg2").feature("glob2").active(true);
          model.result("pg2").feature("glob1").set("data", getCopySolutionDataSetTag());
        } else if ("s".equals(polarization)) {
          model.result("pg2").feature("glob1").active(true);
          model.result("pg2").feature("glob2").active(false);
        } else {
          model.result("pg2").feature("glob1").active(false);
          model.result("pg2").feature("glob2").active(true);
        }
        useGraphics(model.result("pg2"), "/main/graphics1");
        activePlotType = "";
      }
    }
  updateRefractiveIndexPlot: CodeEditor
    public class updateRefractiveIndexPlot extends ApplicationMethod {
      public void execute() {
        if (sweepType.equals("wavelength")) {
          if (refractiveIndexPlotType.equals("spectral")) {
            boolean moreThanOneLayer = model.param().evaluate("nLayers") > 1;
            if (spectralRefractiveIndexPlotGroupTag.length() == 0) {
              // Add a new table graph with the refractive indices versus the wavelength
              model.result().numerical().create("av1", "AvSurface");
              model.result().numerical("av1").set("data", getParametricSolutionDataSetTag());
              model.result().numerical("av1").selection().named("geom1_csel1_dom");
              model.result().numerical("av1").set("expr", "ewbe.nxx");
              model.result().numerical("av1").set("descractive", "on");
              model.result().numerical("av1").set("descr", "Refractive index, prisms");
              model.result().table().create("tbl1", "Table");
              model.result().table("tbl1").comments("Surface Average 1 (ewbe.nxx)");
              model.result().numerical("av1").set("table", "tbl1");
              model.result().numerical("av1").setResult();
              model.result().numerical().duplicate("av2", "av1");
              model.result().numerical("av2").selection().named("geom1_pi1_csel1_dom");
              model.result().numerical("av2").set("descr", "Refractive index, high-index material");
              model.result().numerical("av2").set("table", "tbl1");
              model.result().numerical("av2").appendResult();
              model.result().numerical().duplicate("av3", "av2");
              model.result().numerical("av3").set("descr", "Refractive index, low-index material");
              model.result().numerical("av3").set("table", "tbl1");
              if (moreThanOneLayer) {
                model.result().numerical("av3").selection().named("geom1_pi1_csel2_dom");
                model.result().numerical("av3").appendResult();
              }
              spectralRefractiveIndexPlotGroupTag = model.result().uniquetag("pg");
              ResultFeature pg = model.result().create(spectralRefractiveIndexPlotGroupTag, 1);
              pg.set("data", "none");
              ResultFeature tblp1 = pg.create("tblp1", "Table");
              tblp1.set("table", "tbl1");
              tblp1.set("legend", "on");
              tblp1.set("legendmethod", "manual");
              tblp1.setIndex("legends", "Prisms", 0);
              tblp1.setIndex("legends", "High-index material", 1);
              if (moreThanOneLayer)
                tblp1.setIndex("legends", "Low-index material", 2);
              tblp1.set("xaxisdata", "1");
              tblp1.set("plotcolumninput", "manual");
              if ("solutionexists".equals(solutionState))
                if (moreThanOneLayer)
                  tblp1.set("plotcolumns", new String[]{"3", "4", "5"});
                else
                  tblp1.set("plotcolumns", new String[]{"3", "4"});
              pg.set("xlabelactive", "on");
              pg.set("xlabel", "Wavelength (nm)");
              pg.set("ylabelactive", "on");
              pg.set("ylabel", "Refractive index");
              pg.run();
              useGraphics(pg, "/main/graphics1");
            } else {
              model.result().table("tbl1").clearTableData();
              model.result().numerical("av1").setResult();
              model.result().numerical("av2").appendResult();
              if (moreThanOneLayer) {
                model.result().numerical("av3").selection().named("geom1_pi1_csel2_dom");
                model.result().numerical("av3").appendResult();
              }
              ResultFeature pg = model.result(spectralRefractiveIndexPlotGroupTag);
              with(pg.feature("tblp1"));
                set("xaxisdata", "1");
                if ("solutionexists".equals(solutionState))
                  if (moreThanOneLayer) {
                    set("plotcolumns", new String[]{"3", "4", "5"});
                    setIndex("legends", "Low-index material", 2);
                  } else
                    set("plotcolumns", new String[]{"3", "4"});
              endwith();
              pg.run();
              useGraphics(pg, "/main/graphics1");
            }
          } else if (refractiveIndexPlotType.equals("spatial")) {
            if (sweepType.equals("wavelength")) {
              if (wlnSol == 0) {
                model.result("pg3").setIndex("looplevelinput", "all", 1);
              } else {
                model.result("pg3").setIndex("looplevelinput", "manualindices", 1);
                model.result("pg3").setIndex("looplevelindices", wlnSol, 1);
              }
              useGraphics(model.result("pg3"), "/main/graphics1");
            } else {
              model.result("pg3").setIndex("looplevelinput", "first", 1);
              useGraphics(model.result("pg3"), "/main/graphics1");
            }
          }
        } else if (sweepType.equals("spotRadius")) {
          model.result("pg3").setIndex("looplevelinput", "first", 1);
          useGraphics(model.result("pg3"), "/main/graphics1");
        }
      }
    }
  updateRefractiveIndexPlotDialog: CodeEditor
    public class updateRefractiveIndexPlotDialog extends ApplicationMethod {
      public void execute(String plotType) {
        // Updates the refractive index plot dialog, showing the plottype
        boolean plotRealPart = "real".equals(plotType);
        ResultFeature pg = model.result(refractiveIndexDialogPlotGroup);
        pg.set("data", "mat4".equals(refractiveIndexToPlot) ? "av1" : "mat5".equals(refractiveIndexToPlot) ? "av2" : "av3");
        ResultFeature globalPlot = pg.feature("glob1");
        globalPlot.active(plotRealPart);
        globalPlot = pg.feature("glob2");
        globalPlot.active(!plotRealPart);
        pg.active(true);
        useGraphics(model.result(refractiveIndexDialogPlotGroup), "/refractiveIndexPlot/graphics1");
      }
    }
  updateSpotRadiusList: CodeEditor
    public class updateSpotRadiusList extends ApplicationMethod {
      public void execute() {
        // Updates the spot radius choice list, used by the spot radius selection combobox
        double minW0 = evaluateExpression(w0Min);
        double maxW0 = evaluateExpression(w0Max);
        String format = (minW0 > 1e-4 ? "%.0f" : "%.2f")+" µm";
        String[] value = new String[w0Count];
        String[] display = new String[w0Count];
        for (int i = 0; i < w0Count; ++i) {
          double w0 = w0Count > 1 ? minW0+i*(maxW0-minW0)/(w0Count-1) : minW0;
          value[i] = String.valueOf(i+1);
          display[i] = String.format(format, w0/1e-6);
        }
        getChoiceList("spotRadiiList").setList(value, display);
        if (w0Sol > w0Count) {
          w0Sol = (w0Count+1)/2;
        }
      }
    }
  updateWavelengthList: CodeEditor
    public class updateWavelengthList extends ApplicationMethod {
      public void execute() {
        // Updates the wavelength choice list, used by the wavelength selection combobox
        double wl0 = model.param().evaluate("wl0");
        int wlCount = (int) model.param().evaluate("wlCount");
        double dWl = model.param().evaluate("dWl");
        String format = (dWl > 1e-7 ? "%.0f" : "%.2f")+" nm";
        String[] value = new String[wlCount];
        String[] display = new String[wlCount];
        for (int i = 0; i < wlCount; ++i) {
          double lda0 = wlCount > 1 ? wl0-dWl/2+i*dWl/(wlCount-1) : wl0;
          value[i] = String.valueOf(i+1);
          display[i] = String.format(format, lda0/1e-9);
        }
        getChoiceList("wavelengthList").setList(value, display);
        if (wlSol > wlCount) {
          wlSol = (wlCount+1)/2;
        }
      }
    }
  changePrism: CodeEditor
    public class changePrism extends ApplicationMethod {
      public void execute() {
        changeMaterialType(prismMaterialType, lastUserDefinedPrismRefractiveIndex, "nPrism", "nP0", "matlnk1", ParameterValidator.PRISM_ERROR_MESSAGE);
      }
    }
  changeHighIndex: CodeEditor
    public class changeHighIndex extends ApplicationMethod {
      public void execute() {
        changeMaterialType(highIndexMaterialType, lastUserDefinedHighIndexRefractiveIndex, "nHigh", "nH0", "matlnk2", ParameterValidator.HIGH_INDEX_MATERIAL_ERROR_MESSAGE);
      }
    }
  changeLowIndex: CodeEditor
    public class changeLowIndex extends ApplicationMethod {
      public void execute() {
        changeMaterialType(lowIndexMaterialType, lastUserDefinedLowIndexRefractiveIndex, "nLow", "nL0", "matlnk3", ParameterValidator.LOW_INDEX_MATERIAL_ERROR_MESSAGE);
      }
    }
  changeNumberOfLayers: CodeEditor
    public class changeNumberOfLayers extends ApplicationMethod {
      public void execute(String newValue) {
        redefineGeometry();
        boolean moreThanOneLayerExists = Integer.parseInt(newValue) > 1;
        nLCombobox.set("enabled", moreThanOneLayerExists);
        nLCardstack.set("enabled", moreThanOneLayerExists);
        RefractiveIndexEvaluator.setGlobalEquations();
      }
    }
  showPrismMaterialPlot: CodeEditor
    public class showPrismMaterialPlot extends ApplicationMethod {
      public void execute() {
        showRefractiveIndexPlotDialog(prismGlobalMaterial);
      }
    }
  updateRefractiveIndexPrism: CodeEditor
    public class updateRefractiveIndexPrism extends ApplicationMethod {
      public void execute() {
        changeRefractiveIndex("nPrism", lastUserDefinedPrismRefractiveIndex, ParameterValidator.PRISM_ERROR_MESSAGE);
      }
    }
  showHighIndexMaterialPlot: CodeEditor
    public class showHighIndexMaterialPlot extends ApplicationMethod {
      public void execute() {
        showRefractiveIndexPlotDialog(highIndexGlobalMaterial);
      }
    }
  updateRefractiveIndexHigh: CodeEditor
    public class updateRefractiveIndexHigh extends ApplicationMethod {
      public void execute() {
        changeRefractiveIndex("nHigh", lastUserDefinedHighIndexRefractiveIndex, ParameterValidator.HIGH_INDEX_MATERIAL_ERROR_MESSAGE);
      }
    }
  showLowIndexMaterialPlot: CodeEditor
    public class showLowIndexMaterialPlot extends ApplicationMethod {
      public void execute() {
        showRefractiveIndexPlotDialog(lowIndexGlobalMaterial);
      }
    }
  updateRefractiveIndexLow: CodeEditor
    public class updateRefractiveIndexLow extends ApplicationMethod {
      public void execute() {
        changeRefractiveIndex("nLow", lastUserDefinedLowIndexRefractiveIndex, ParameterValidator.LOW_INDEX_MATERIAL_ERROR_MESSAGE);
      }
    }
  changeSweepType: CodeEditor
    public class changeSweepType extends ApplicationMethod {
      public void execute() {
        if ("wavelength".equals(sweepType)) {
          double wl0 = model.param().evaluate("wl0");
          double dWl = model.param().evaluate("dWl");
          if (wl0 <= dWl) {
            model.param().set("dWl", "0.5*wl0");
            lastDWl = model.param().get("dWl");
          }
          setWavelengthSweep();
          updateWavelengthList();
          model.param().set("w0", lastW0);
        } else {
          setSpotRadiusSweep();
          updateSpotRadiusList();
          lastW0 = model.param().get("w0");
          model.param().set("w0", w0Min);
        }
        inputHasChanged();
      }
    }
  changePolarization: CodeEditor
    public class changePolarization extends ApplicationMethod {
      public void execute() {
        updatePolarizationDisplayList();
        inputHasChanged();
      }
    }
  changeBandwidth: CodeEditor
    public class changeBandwidth extends ApplicationMethod {
      public void execute() {
        boolean failed = true;
        String errorMessage = null;
        if (ParameterValidator.bandWidthIsPositive()) {
          if (ParameterValidator.wavelengthAndBandwidthAreValid()) {
            failed = false;
          } else {
            errorMessage = ParameterValidator.MINIMUM_CENTER_WAVELENGTH_ERROR_MESSAGE;
          }
        } else {
          errorMessage = ParameterValidator.MINIMUM_BAND_WIDTH_ERROR_MESSAGE;
        }
        if (failed) {
          model.param().set("dWl", lastDWl);
          error(errorMessage);
        } else {
          updateWavelengthList();
          lastDWl = model.param().get("dWl");
          inputHasChanged();
        }
      }
    }
  changeNumberOfWaveLengths: CodeEditor
    public class changeNumberOfWaveLengths extends ApplicationMethod {
      public void execute() {
        updateWavelengthList();
        setWavelengthSweep();
        inputHasChanged();
      }
    }
  changeSpotRadius: CodeEditor
    public class changeSpotRadius extends ApplicationMethod {
      public void execute() {
        if (ParameterValidator.wavelengthSpotRadiusAndPrismRefractiveIndexAreValid()) {
          lastW0 = model.param().get("w0");
          inputHasChanged();
        } else {
          model.param().set("w0", lastW0);
          error(ParameterValidator.MINIMUM_SPOT_RADIUS_ERROR_MESSAGE);
        }
      }
    }
  changeSmallestSpotRadius: CodeEditor
    public class changeSmallestSpotRadius extends ApplicationMethod {
      public void execute() {
        boolean failed = true;
        String errorMessage = null;
        if (ParameterValidator.wavelengthMinimumSpotRadiusAndPrismRefractiveIndexAreValid()) {
          if (ParameterValidator.minimumAndMaximumSpotRadiusAreValid())
            failed = false;
          else
            errorMessage = ParameterValidator.MINIMUM_AND_MAXIMUM_SPOT_RADII_ERROR_MESSAGE;
        } else
          errorMessage = ParameterValidator.MINIMUM_SPOT_RADIUS_ERROR_MESSAGE;
        if (failed) {
          w0Min = lastW0Min;
          error(errorMessage);
        } else {
          lastW0Min = w0Min;
          setSpotRadiusSweep();
          updateSpotRadiusList();
          model.param().set("w0", w0Min);
          inputHasChanged();
        }
      }
    }
  changeLargestSpotRadius: CodeEditor
    public class changeLargestSpotRadius extends ApplicationMethod {
      public void execute() {
        if (ParameterValidator.minimumAndMaximumSpotRadiusAreValid()) {
          lastW0Max = w0Max;
          setSpotRadiusSweep();
          updateSpotRadiusList();
          inputHasChanged();
        } else {
          w0Max = lastW0Max;
          error(ParameterValidator.MINIMUM_AND_MAXIMUM_SPOT_RADII_ERROR_MESSAGE);
        }
      }
    }
  changeNumberOfSpotRadii: CodeEditor
    public class changeNumberOfSpotRadii extends ApplicationMethod {
      public void execute(String newValue) {
        if ("1".equals(newValue)) {
          w0Max = w0Min;
          lastW0Max = w0Max;
        } else {
          if (lastW0Count == 1) {
            w0Max = w0Min+"*1.5";
            lastW0Max = w0Max;
          }
        }
        lastW0Count = w0Count;
        setSpotRadiusSweep();
        updateSpotRadiusList();
        inputHasChanged();
      }
    }
  changeCenterWavelength: CodeEditor
    public class changeCenterWavelength extends ApplicationMethod {
      public void execute() {
        double wl0 = model.param().evaluate("wl0");
        double w0 = model.param().evaluate("w0");
        boolean failed = true;
        String errorMessage = null;
        if (!"wavelength".equals(sweepType) || ParameterValidator.wavelengthAndBandwidthAreValid()) {
          if ("spotRadius".equals(sweepType) && wl0 <= model.param().evaluate("dWl")/2) {
            model.param().set("dWl", "1.5*wl0");
          }
          boolean runStudy = true;
          double nPrism;
          if ("userDefined".equals(prismMaterialType)) {
            nPrism = model.param().evaluate("nPrism");
          } else {
            nPrism = RefractiveIndexEvaluator.getRefractiveIndex("nP0");
            runStudy = false;
          }
          if (ParameterValidator.wavelengthSpotRadiusAndPrismRefractiveIndexAreValid(wl0, w0, nPrism)) {
            double nHigh;
            if ("userDefined".equals(highIndexMaterialType))
              nHigh = model.param().evaluate("nHigh");
            else {
              nHigh = RefractiveIndexEvaluator.getRefractiveIndex("nH0", runStudy);
              runStudy = false;
            }
            double nLow;
            if ("userDefined".equals(lowIndexMaterialType) || model.param().evaluate("nLayers") < 3)
              nLow = model.param().evaluate("nLow");
            else {
              nLow = RefractiveIndexEvaluator.getRefractiveIndex("nL0", runStudy);
            }
            if (ParameterValidator.refractiveIndicesAreValid(nPrism, nHigh, nLow)) {
              model.param().set("nPrism", nPrism);
              model.param().set("nHigh", nHigh);
              model.param().set("nLow", nLow);
              lastWl0 = model.param().get("wl0");
              updateWavelengthList();
              inputHasChanged();
              failed = false;
            } else {
              errorMessage = ParameterValidator.LOW_INDEX_MATERIAL_ERROR_MESSAGE;
            }
          } else {
            errorMessage = ParameterValidator.MINIMUM_SPOT_RADIUS_ERROR_MESSAGE;
          }
        } else {
          errorMessage = ParameterValidator.MINIMUM_CENTER_WAVELENGTH_ERROR_MESSAGE;
        }
        if (failed) {
          model.param().set("wl0", lastWl0);
          error(errorMessage);
        }
      }
    }
  changePlotType: CodeEditor
    public class changePlotType extends ApplicationMethod {
      public void execute(String newValue) {
        updateRefractiveIndexPlotDialog(newValue);
      }
    }
  onLoadUpdateRefractiveIndexDialog: CodeEditor
    public class onLoadUpdateRefractiveIndexDialog extends ApplicationMethod {
      public void execute() {
        updateRefractiveIndexPlotDialog(refractiveIndexDialogPlotType);
      }
    }
  changeWavelength: CodeEditor
    public class changeWavelength extends ApplicationMethod {
      public void execute() {
        with(model.result("pg3"));
          if (wlnSol == 0) {
            setIndex("looplevelinput", "all", 1);
          } else {
            setIndex("looplevelinput", "manualindices", 1);
            setIndex("looplevelindices", Integer.toString(wlnSol), 1);
          }
        endwith();
        model.result("pg3").run();
      }
    }